// SBML level 3 version 2

model two_compartment_pk_model()
  // model units - time: hour

  // Compartments:
  compartment central = 1 liter;
  compartment peripheral = 1 liter;

  // Species:
  species drug in central = 0;  // substance in mg
  species drug_peripheral in peripheral = 0;  // substance in mg

  // Parameters:
  clearance = 1 liter_per_hour;
  inter_compartment_clearance = 1 liter_per_hour;

  // Reactions:
  clearance_reaction: drug => ; clearance*drug;
  transition_to_peripheral_compartment: drug => drug_peripheral; inter_compartment_clearance*drug;
  transition_to_central_compartment: drug_peripheral => drug; inter_compartment_clearance*drug_peripheral;

  // Unit definitions:
  unit hour = 3600 second;
  unit liter_per_hour = liter / (3600 second);
  unit mg = 1e-3 gram;
end
