// SBML level 3 version 2

model tumour_growth_inhibition_model()
  // model units - time: day

  // Parameters:
  tumour_volume = 1 cm_cubed;
  lambda_0 = lambda_1*kappa; lambda_0 has per_day;
  lambda_1 = 1 cm_cubed_per_day;
  kappa = 1 liter_per_mg_per_day;
  drug_concentration = 1 mg_per_liter;

  // Rate rules:
  tumour_volume' = 2*lambda_0*lambda_1*tumour_volume/(2*lambda_0*tumour_volume + lambda_1) - kappa*drug_concentration*tumour_volume;

  // Unit definitions:
  unit cm_cubed = (0.01 meter)^3;
  unit day = 86400 second;
  unit per_day = 1 / (86400 second);
  unit cm_cubed_per_day = (0.01 meter)^3 / (86400 second);
  unit liter_per_mg_per_day = liter / (1e-3 gram * 86400 second);
  unit mg_per_liter = 1e-3 gram / liter;
end
