// SBML level 3 version 2

model one_compartment_pk_model()
  // model units - time: day

  // Compartments:
  compartment central = 1 liter;
  compartment peripheral = 1 liter;

  // Species:
  species drug in central = 0;  // substance in mg
  species drug_peripheral in peripheral = 0;  // substance in mg

  // Parameters:
  elimination_rate = 1 per_day;
  transition_rate_c2p = 1 per_day;
  transition_rate_p2c = 1 per_day;

  // Reactions:
  central_reaction: drug => ; central*elimination_rate*drug;
  transition_central_to_peripheral: drug => drug_peripheral; central*transition_rate_c2p*drug;
  transition_peripheral_to_central: drug_peripheral => drug; peripheral*transition_rate_p2c*drug_peripheral;

  // Unit definitions:
  unit day = 86400 second;
  unit per_day = 1 / (86400 second);
  unit mg = 1e-3 gram;
end
