// SBML level 3 version 2

model one_compartment_pk_model_and_reparametrised_koch_2009_pd_model()
  // model units - time: day

  // Compartments:
  compartment central = 1 liter;

  // Species:
  species drug in central = 0;  // substance in mg

  // Parameters:
  critical_volume = 1 cm_cubed;
  drug_concentration = 1 mg_per_liter;
  elimination_rate = 1 per_day;
  kappa = 1 liter_per_mg_per_day;
  lambda = 1 per_day;
  tumour_volume = 1 cm_cubed;

  // Rate rules:
  tumour_volume' = lambda*critical_volume*tumour_volume/(tumour_volume + critical_volume) - kappa*drug_concentration*tumour_volume;

  // Reactions:
  central_reaction: drug => ; elimination_rate*drug;

  // Unit definitions:
  unit cm_cubed = (0.01 meter)^3;
  unit cm_cubed_per_day = (0.01 meter)^3 / (86400 second);
  unit day = 86400 second;
  unit liter_per_mg_per_day = liter / (1e-3 gram * 86400 second);
  unit mg = 1e-3 gram;
  unit mg_per_liter = 1e-3 gram / liter;
  unit per_day = 1 / (86400 second);
end
