// SBML level 3 version 2

model tumour_growth_inhibition_model()
  // model units - time: day

  // Parameters:
  tumour_volume = 1 cm_cubed;
  lambda = 1 per_day;
  critical_volume = 1 cm_cubed;
  kappa = 1 liter_per_mg_per_day;
  drug_concentration = 1 mg_per_liter;

  // Rate rules:
  tumour_volume' = lambda*critical_volume*tumour_volume/(tumour_volume + critical_volume) - kappa*drug_concentration*tumour_volume;

  // Unit definitions:
  unit cm_cubed = (0.01 meter)^3;
  unit day = 86400 second;
  unit per_day = 1 / (86400 second);
  unit cm_cubed_per_day = (0.01 meter)^3 / (86400 second);
  unit liter_per_mg_per_day = liter / (1e-3 gram * 86400 second);
  unit mg_per_liter = 1e-3 gram / liter;
end
